# Berechnung der absoluten Feuchte
# Eingangsparameter / physikalische Größen
# Gaskonstante Wasserdampf
R_D := 461.51*J/(K*kg)
# Gaskonstante trockene Luft
R_tL := 287.058*J/(K*kg)
# Eingabeparameter / Messgrößen
# Umgebungsdruck
p_U := 101325*Pa
# Messgrößen
# Raumtemperatur
T_R := 20.4 °C
# relative Feuchte (in Prozent)
φ_R := 61.5%
φ_R = 0.615
# Berechnungen
# Dichte trockene Luft
ρ_tL := p_U/(R_tL*T_R) = 1.20244 kg/m^3
# Sättigungsdruck
E_R := 6.112*10^2 Pa*e^(17.62*(T_R - 273.15 K)/(243.12*K + (T_R - 273.15 K)))
# Partialdruck
e_R := φ_R*E_R = 1470.44 Pa
# absolute Feuchte
ρ_R := e_R/(R_D*T_R) = 10.8539 gm/m^3
# Gaskonstante feuchte Luft
R_tF := R_tL/(1 - (φ_R*E_R/p_U)*(1 - R_tL/R_D)) = 288.641 J/(kg*K)
# Dichte feuchte Luft
ρ_tL := p_U/(R_tF*T_R) = 1.19585 kg/m^3
# Vereinfachungen für die Berechnung auf dem ESP
# Messgrößen
# Raumtemperatur in Grad Celsius
T_R := 20.4
# relative Feuchte (in Prozent)
φ_R := 61.5%
φ_R = 0.615
# absolute Feuchtigkeit in kg/Kubikmeter (Größengleichung)
ρ == φ_R*6.112*10^2 Pa*e^(17.62*(T_R - 273.15*K)/(243.12*K + (T_R - 273.15*K)))/(461.51*J/(K*kg)*T_R)
ρ := φ_R*1.32434833481*e^(17.62*T_R/(T_R + 243.12))/(T_R + 273.15) = 0.0108539
# absolute Feuchte in g/Kubikmeter (Größengleichung)
ρ := φ_R*1324.34*e^(17.62*T_R/(T_R + 243.15))/(T_R + 273.15) = 10.8521
# Berechnung der dynamischen Schaltschwelle
# Genauigkeit des AM2302
# Temperatur: +/- 0.5 °C
# rel. Feuchte: +/- 2%
# Raumtemperatur in °C
T_R = 20.4
# maximaler Fehler der Luftfeuchtigkeit
Δφ_R := 5%
# Änderung der absoluten Feuchte in g/m³
# dynamische Schaltschwelle
Δρ_d := 1324.34*Δφ_R*e^(0.0696*T_R)/(T_R + 273.15) = 0.933074
